**
** ABAQUS Input Deck Generated by HyperMesh Version  : 2022.0.0.33
** Generated using HyperMesh-Abaqus Template Version : 2022.0.0.33
** Generated on 04-25-2024 at 19:05:31
**
**   Template:  ABAQUS/STANDARD 3D
**
*NODE
         1,  50.0           ,  49.999999999989,  24.999999999989
         2,  50.0           ,  44.794155560966,  20.0651637242
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**HW_COMPONENT     ID=1     COLOR=37     NAME=NONE     PROPERTY=shell_al-1p0
*ELEMENT,TYPE=S4R
         1,        98,       100,       101,        97
         2,        97,       101,        94,        95
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*ELSET, ELSET=HMprop_shell_al-1p0
         1,         2,         3,         4,         5,         6
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**HM_set_by_property     7          1
*SHELL SECTION, ELSET=HMprop_shell_al-1p0, MATERIAL=AL
1.0       ,
**HMNAME MATS          1 AL     6
*MATERIAL, NAME=AL
*DENSITY
2.7000E-09,0.0
*ELASTIC, TYPE = ISOTROPIC
72000.0   ,0.33      ,0.0
**HMNAME LOADSTEP          1 step-1
*STEP
*STATIC
**HWNAME LOADCOL          1 fix
**HWCOLOR LOADCOL          1    29
*BOUNDARY
49,1,6,0.0
48,1,6,0.0
47,1,6,0.0
46,1,6,0.0
45,1,6,0.0
44,1,6,0.0
43,1,6,0.0
42,1,6,0.0
41,1,6,0.0
40,1,6,0.0
39,1,6,0.0
38,1,6,0.0
37,1,6,0.0
36,1,6,0.0
35,1,6,0.0
34,1,6,0.0
33,1,6,0.0
**HWNAME LOADCOL          2 force
**HWCOLOR LOADCOL          2     4
*CLOAD
9,3,1000.0
*OUTPUT, FIELD, VARIABLE = PRESELECT
*END STEP
*****
